# FREE SPAN ANALYSIS FOR SUBSEA GAS EXPORT PIPELINE
# Prepared by Collins Jesurobo
# This Mathcad sheet calculates the maximum allowable free span lengths along the pipeline route for onset of in-line and cross flow vortex induced vibrations (VIVs),  as well as Euler buckling. The methodology is that presented in DnV RP-F105.
# This Mathcad sheet also calculates the maximum allowable free span length to avoid local buckling. The method is based on limit state design code DNVGL ST-F101 and is driven by load controlled criteria.
#
# The maximum allowable free span lengths are determined for 4 load cases:
#
# 1. Installed with the pipe empty (defined as depressurised, pipe empty)
#
# 2. Installation with the pipe flooded (defined as depressurised , pipe flooded)
#
# 3. Hydrotest prior to operation (defined as system pressure test where the pipe is flooded);
#
# 4. Pipe in operation (under design pressure)
#
# For load case 4 (operation), the pipe is considered operating on seabed (not trenched or buried).The wave water particle kinematics are determined based on the linear Airy wave theory. The Morison equation is used to derive the hydrodynamic forces of drag and inertia.For determining the maximum allowable free span lengths to avoid in-line and cross-flow VIVs, the significant wave height along with the wave peak period and associated seabed current are used. For determining the maximum allowable free span length to avoid local buckling, the maximum wave height along with the wave maximum period and associated seabed current are used.
# TABLE OF CONTENT
#
# 1. INPUT DATA
#
# 1.1 Pipe Data
# 1.2 Environmental Data
# 1.3 Installation & Hydrotest Data
# 1.4 Soil & Geotechnical Data
# 1.5 Design Factors
# 1.6 Boundary Conditions
#
# 2. PRELIMINARY CALCULATIONS
#
# 2.1 General Calculations
# 2.2 Effective Axial Force
# 2.3 Hydrodynamic Loading
#
# 3. FREE SPAN ANALYSIS
#
# 3.1 Maximum Allowable Free Span Length -Local Buckling
# 3.2 Maximum Allowable Free Span Length -Global Buckling (Euler Bar Buckling)
# 3.3 Maximum Allowable Free Span Length -In-line VIVs
# 3.4 Maximum Allowable Free Span Length -Cross-flow VIVs
#
# 4. SUMMARY OF RESULT
# 1. INPUT DATA
# Enter only data highlighted. Other data have already been defined or automatically calculated below.
# Define units:
C := 1*K
g := 9.81*m*s^-2
°C := 1*C
# 1.1 Pipe Data
# Pipe outer diameter:
OD := 356.1*mm
# Pipe wall thickness:
wt := 19.3*mm
# Specify material type:
# (Select from the list on the right the pipe material: CMn
# is for carbon manganese (carbon steel );
# DSS is for 22Cr duplex and 25Cr super duplex
# Note: This is used for temperature derating, see below)
# [component: outputs Material]
# Fabrication process:
# (Select from the list the pipe fabrication process:
# "Seamless", "UO & TRB & ERW", or "UOE")
# [component: outputs Process]
# Pipe Young's modulus of elasticity:
E :=
    2.07*10^5*MPa if Material == "CMn"
    2.00*10^5*MPa if Material == "DSS"
E = 207000 MPa
# Pipe material density:
ρ_st :=
    7850*kg/m^3 if Material == "CMn"
    7700*kg/m^3 if Material == "DSS"
ρ_st = 7850 kg/m^3
# Corrosion and insulation coating thickness:
t_coat := 3*mm
# Coating equivalent density:
ρ_coat := 944*kg/m^3
# Note: For multi-layer coating, the equivalent coating density can be approximated by
(coat_thick1*density_1 + coat_thick2*density_2 + .......)/thick_totalsum
# Pipe specified minimum yield strength:
SMYS := 448*MPa
# Pipe specified minimum tensile strength:
SMTS := 530. MPa
# Pipe temperature (for installation)
T_inst := 4*°C
# Pipe design temperature (for operation):
T_oper := 78*°C
T_amb := 4*°C
# Seawater ambient temperature at seabed
# Pipe material Poisson's ratio
ν :=
    0.3 if Material == "CMn"
    0.32 if Material == "DSS"
ν = 0.3
# Pipe coefficient of thermal expansion:
α_pipe :=
    1.17*10^-5*C^-1 if Material == "CMn"
    1.13*10^-5*C^-1 if Material == "DSS"
α_pipe = 1.17e-5 C^-1
# Is material subject to supplementary requirement U?
# Select "Yes" or "No".
Supp_req_U := "No"
# Note: For design purpose, conservatively select "No"
# Derating for yield strength & tensile strength (DNVGLSTF101)
# Note: For installation where temperature is ambient, the material strengths is not derated. Derating the material should only apply for operation load case where operating temperature is higher than 50 deg C for carbon steel and 20 deg C for duplex steel
# Derating for yield and tensile strength:
# For operation:
f_yCMn_oper :=
    0 if T_oper ≤ 50*°C and Material == "CMn"
    ((30*MPa/(50*°C))*(T_oper - 50*°C)) if 50*°C < T_oper < 100*°C and Material == "CMn"
    (30*MPa + (T_oper - 100*°C)*(20*MPa/(50*°C))) otherwise
f_yCMn_oper = 16.8 MPa
f_yDSS_oper :=
    0 if T_oper ≤ 20*°C
    (40*MPa/(30*°C)*(T_oper - 20*°C)) if 20*°C < T_oper < 50*°C
    (40*MPa + (T_oper - 50*°C)*MPa/°C) otherwise
f_yDSS_oper = 68 MPa
# For installation:
f_yCMn_inst := 0
f_yDSS_inst := 0
# 1 .2 Environmental Data
# Maximum water depth
d_max := 1457*m
# 1-year negative storm surge:
Surge_neg := -0*m
# Min Water depth at LAT:
LAT := 1400*m
d_min := LAT + Surge_neg
# Extreme minimum water depth:
d_min = 1400 m
# Density of sea water
ρ_water := 1025*kg/m^3
# sea water kinematic viscosity
# (at 4degC)
v_k := 1.5*10^-6*m^2/sec
# Note: The significant wave height and wave peak period are used to derive the maximum span lengths to prevent in-line and cross-flow vortex induced vibrations. The maximum wave height and wave maximum period are used to derive the maximum allowable span length to avoid local buckling.
# Design wave for installation phase
# Main swell 1-year significant wave height
H_1s_swell1 := 2.60*m
# Second swell 1-year significant wave height
H_1s_swell2 := 1.15*m
# Wind sea 1-year significant wave height
H_1s_wind := 2.05*m
# 1-year equivalent significant wave height
H_s_inst := sqrt(H_1s_swell1^2 + H_1s_swell2^2 + H_1s_wind^2)
H_s_inst = 3.505 m
# Note: The use of the 1-year value of the second swell significant wave height is conservative. For joint extreme conditions the 95% percentile value of the second swell significant wave height is recommended to be used
# 1-year wave peak period
T_p_inst := 15.9*sec
# 1-year maximum wave height
H_max_inst := 2*H_s_inst
H_max_inst = 7.00999 m
# 1-year maximum wave period
T_max_inst := T_p_inst
T_max_inst = 15.9 s
# Design wave for operation phase
# Main swell 100-year significant wave height
H_100s_swell1 := 3.60*m
# Second swell 100-year significant wave height
H_100s_swell2 := 1.55*m
# Wind sea 100-year significant wave height
H_100s_wind := 2.75*m
# 100-year equivalent significant wave height
H_s_oper := sqrt(H_100s_swell1^2 + H_100s_swell2^2 + H_100s_wind^2)
H_s_oper = 4.78801 m
# Note: The use of the 100-year value of the second swell significant wave height is conservative. For joint extreme conditions the 95% percentile value of the second swell significant wave height is recommended to be us.
# 100-year wave peak period:
T_p_oper := 17.5*sec
# Note: Conservatively, the peak period associated with the main swell is considered for the equivalent significant wave height.
# 100-year maximum wave height:
H_max_oper := 2*H_s_oper
H_max_oper = 9.57601 m
# 100-year maximum wave period
T_max_oper := T_p_oper
T_max_oper = 17.5 s
# Design seabed condition for installation and operation case
# Note: The seabed current is given at 9m above seabed. The 7th power law is used to calculate the current nearer seabed (1m).
# 1-year current at 9m above seabed:
u_1cur_9m := 0.2*m/sec
# 10-year current at 9m above seabed:
u_10cur_9m := 0.26*m/sec
# Installation (1-year) and operation (10-year) current at 1m above seabed:
u(u_cur) := u_cur*(1*m/(9*m))^(1/7)
# Installation current:
u_cur_inst := u(u_1cur_9m)
u_cur_inst = 0.14612 m/s
# Operation current:
u_cur_oper := u(u_10cur_9m)
u_cur_oper = 0.189956 m/s
# Steady near seabed current reference height:
Z_ref := 1*m
# Note: The hydrodynamic inertia coefficient is defined below (after determination of added mass coefficient). The hydrodynamic drag coefficient is defined below as function of Reynolds number:
# 1.3 Installation, Hydrotest and Operation Data
# Content density (pipe in operation)
ρ_oper := 200*kg/m^3
# Design pressure at MSL:
P_msl := 215*bar
# Design pressure at seabed:
P_d := P_msl + ρ_oper*g*d_max
P_d = 243.586 bar
# Internal pressure when installed empty:
P_inst := 0. bar
# Internal pressure when installed flooded:
P_flood := ρ_water*g*d_max
P_flood = 146.505 bar
# Internal pressure during hydrotest:
P_hydrotest := 1.10*1.05*P_msl + ρ_oper*g*d_max
P_hydrotest = 276.911 bar
# Note: The coefficient shown above (1.10*1.05) for the strength hydrotest pressure are from the pipeline design DNVGLSTF-F101 .Conservatively, the maximum water depth is used to derive the hydrotest pressure and pressure in the pipeline when flooded and unpressurised.
# Effective residual lay tension:
# (from installation)
H_lay := 0. kN
# Note: Ignoring residual lay tension after installation is conservative
# 1.4 Soil & Geotechnical Data
# Seabed soil roughness parameter:  (DNVRPF105)
Z_o := 5*10^-6*m  # (silt,CLAY)
# Dynamic vertical stiffness
# (DNVRPF105)
C_V := 1400*kN/m^2.5  # (soft,CLAY)
# Dynamic lateral stiffness
# (DNVRPF105)
C_L := 1200*kN/m^2.5  # (soft,CLAY)
# Soil poisson's ratio
υ_s := 0.45  # (soft,CLAY)
# Trench depth
Δ := 0.0*m
# Note: Trench depth is used to determine the relative trench depth (∆/OD)
# Seabed gap
e := 2*OD
# Note: this is used to calculate seabed gap ratio (e/OD).
#
# Note: This is used to calculate seabed gap ratio (e/ODtot). Conservatively, a value of e/ODtot more than 0.8 is selected
# 1.5 Design Factors
# Load cases counter:
i := 0 .. 3
# Note: 4 Load cases are analysed:
# 1. Hydrotest (system pressure test) -pipe is flooded
# 2. Installation - pipe is flooded (contingency)
# 3. Installation - pipe is empty (basecase)
# 4. Operation (pipe with operational content).
# DNV RP-F105 factors
# Structural damping:
ζ_str := 0.005
# Soil damping:
ζ_soil := 0.01
# Hydrodynamic damping:
ζ_h := 0.00
# Total modal damping:
ζ_T := ζ_str + ζ_soil + ζ_h
ζ_T = 0.015
# Safety factor for screening - In Line
γ_IL := 1.4
# Safety Factor on Screening - Cross Flow
γ_CF := 1.4
# Safety factor on stress amplitude:
γ_s := 1.3
# Safety Factor on Stability Parameter:
γ_k := 1.0
# Safety factor on onset value for In-Line VIV
γ_onIL := 1.1
# Safety Factor on Onset Value for Cross Flow VIV
γ_onCF := 1.2
# Safety factor for natural frequency:
γ_f := 1.1
# Maximum fabrication factor:
α_fab :=
    1.0 if Process == "Seamless"
    0.93 if Process == "UO & TRB & ERW"
    0.85 if Process == "UOE"
α_fab = 1
# Characteristic Material Strength Factor:
α_u :=
    1.0 if Supp_req_U == "No"
    0.96 if Supp_req_U == "No"
α_u = 0.96
# Characteristic material strength factor for pressure test:
α_utest := 1.0
# Material resistance factor (ULS)
γ_m := 1.15
# Safety class resistance factor
γ_sc := [1.046; 1.04; 1.04; 1.308]
# Functional load effect factor:
γ_F := 1.1
# Environmental load factor
γ_E := 1.3
# Condition Load Effect Factor
γ_c := [1.00; 1.07; 1.07; 1.00]
# Note: For simultaneously system pressure test on an uneven seabed, the resulting condition factor will be 1.07*0.93=1
# 1.6 Boundary Conditions
# Three boundary conditions are presented in DNV-RP-F105. They are:
# • Pinned - Pinned
# • Fixed - Fixed
# • Single Span on Seabed
# Pinned-Pinned : 1 | Fixed - Fixed: 2 | Single Span: 3
BC := 1
# Input BC as above
C_1 :=
    1.57 if BC == 1
    3.56 if BC == 2
    3.56 if BC == 3
C_2 :=
    1.00 if BC == 1
    4.00 if BC == 2
    4.00 if BC == 3
C_1 = 1.57
C_2 = 1
C_3 :=
    0.80 if BC == 1
    0.20 if BC == 2
    0.40 if BC == 3
C_4 :=
    4.93 if BC == 1
    14.10 if BC == 2
    8.60 if BC == 3
C_3 = 0.8
C_4 = 4.93
C_5 :=
    1/8 if BC == 1
    1/12 if BC == 2
    1/24 if BC == 3
C_6 :=
    5/384 if BC == 1
    1/384 if BC == 2
    1/384 if BC == 3
C_5 = 0.125
C_6 = 0.0130208
# Note: In most analyses, the pinned-pinned and fixed-fixed boundary conditions are used to determine the lower and upper limits of the allowable span respectively. Therefore, if a particular span is identified which is at some distance from the next one and could be classified as free span, it would be conservative to treat its boundary as Pinned-Pinned.
# 2. PRELIMINARY CALCULATIONS
# 2.1 General Calculations
# Pipe overall outer diameter
OD_tot := OD + 2*t_coat
OD_tot = 362.1 mm
# Pipe internal diameter
ID := OD - 2*wt
ID = 317.5 mm
# Steel cross sectional area
A_st := π/4*(OD^2 - ID^2)
A_st = 20421.1 mm^2
# Pipeline steel unit weight
W_st := π/4*((OD^2 - ID^2)*ρ_st)*g
W_st = 1572.6 N/m
# Coating area
A_coat := π/4*(OD_tot^2 - OD^2)
A_coat = 3384.44 mm^2
# Coating unit weight
W_coat := ρ_coat*A_coat*g
W_coat = 31.3421 N/m
# Buoyancy
B_Y := ρ_water*g*π/4*(OD_tot^2)
B_Y = 1035.48 N/m
# Internal cross sectional area
A_int := π/4*ID^2
A_int = 79173 mm^2
# Contents unit weight (seawater filled)
W_sea := A_int*ρ_water*g
W_sea = 796.105 N/m
# Contents unit weight (during operation)
W_oper := A_int*ρ_oper*g
W_oper = 155.338 N/m
# Submerged weight of pipe
# (seawater filled)
W_s_flood := (W_st + W_coat + W_sea - B_Y)
W_s_flood = 1364.57 N/m
# Submerged weight of pipe
# (during operation)
W_s_oper := (W_st + W_coat + W_oper - B_Y)
W_s_flood = 1364.57 N/m
# Weight of pipe in air
# (seawater filled)
W_a_flood := (W_st + W_coat + W_sea)
W_a_flood = 2400.05 N/m
# Weight of pipe in air
# (operational content filled)
W_a_oper := (W_st + W_coat + W_oper)
W_a_oper = 1759.28 N/m
# Submerged weight of pipe
# (empty)
W_s_empty := (W_st + W_coat - B_Y)
W_s_empty = 568.465 N/m
# Weight of pipe in air
# (empty)
W_a_empty := (W_st + W_coat)
W_a_empty = 1603.94 N/m
# Ratio of pipe mass to displaced water
ρ_s := W_a_empty/(π/4*(OD_tot^2))
ρ_s = 15575.5 N/m^3
# Note: It is understood that the pipe mass ratio to displaced water does neither include added mass nor the mass of the content fluid (i.e. consider mass of pipe empty in air)
# Specific mass ratio defined as pipe
# mass (not including the added mass)
# and the displaced water
ρ_s/(ρ_water*g) = 1.54899
# The dynamic soil stiffness expression is valid for
1.2 < ρ_s/(ρ_water*g) < 2.0
# Dynamic soil stiffness:
# Lateral soil stiffness
K_L := C_L*(1 + υ_s)*(2/3*(ρ_s/(ρ_water*g)) + 1/3)*sqrt(OD_tot)
K_L = 1.43025 MPa
# Vertical soil stiffness
K_v := C_V/(1 - υ_s)*(2/3*(ρ_s/(ρ_water*g)) + 1/3)*sqrt(OD_tot)
K_v = 2.09232 MPa
# Second moment of area
I := π/64*(OD^4 - ID^4)
I = 0.000290507 m^4
# Minimum external pressure
P_exmin := ρ_water*g*d_min
P_exmin = 140.774 bar
# Characteristic yield strength
# (System pressure test)
f_ytest_inst := (SMYS - f_yCMn_inst)*α_utest
f_ytest_inst = 448 MPa
# Characteristic tensile strength
# (System pressure test)
f_utest_inst := (SMTS - f_yCMn_inst)*α_utest
f_utest_inst = 530 MPa
# Characteristic yield strength (Installation)
# (No material de-rating)
f_yinst := SMYS*α_u
f_yinst = 430.08 MPa
# Characteristic tensile strength (Installation)
# (No material de-rating)
f_uinst := SMTS*α_u
f_uinst = 508.8 MPa
# Characteristic yield strength (Operation)
# (material de-rating)
f_yoper := (SMYS - f_yCMn_oper)*α_u
f_yoper = 413.952 MPa
# Characteristic tensile strength (Operation)
# (material de-rating)
f_uoper := (SMTS - f_yCMn_oper)*α_u
f_uoper = 492.672 MPa
# 2.2 Effective Axial Force
# The pipeline is installed at ambient temperatures. The system pressure test is conducted at ambient temperatures, i.e.. there is no thermal induced compressive force. However, the pressure test induces an axial compressive stress due to Poisson's effect. The residual lay tension is conservatively neglected.For operation (load case 4), the differential between ambient (installation temperature) and design temperature is accounted for.
# Installation and hydrotest temperature difference
ΔT_inst := T_inst - T_amb
ΔT_inst = 0 C
# Operation temperature difference
ΔT_oper := T_oper - T_amb
ΔT_oper = 74 C
# Temperature gradient for the 4 load cases:
ΔT := [ΔT_inst; ΔT_inst; ΔT_inst; ΔT_oper]
ΔT[i] = [0; 0; 0; 74] C
# Local pressure (for the 4 load cases)
P_l := [P_inst; P_flood; P_hydrotest; P_d]
P_l[i] = [0; 146.505; 276.911; 243.586] bar
# Internal pressure difference relative to as laid
# (at minimum water depth)
ΔP := P_l - P_inst
ΔP[i] = [0; 146.505; 276.911; 243.586] bar
# Effective axial force (pipe considered thin walled)
S_eff := H_lay - ΔP*A_int*(1 - 2*ν) - A_st*E*ΔT*α_pipe
S_eff[i] = [0; -463.97; -876.957; -4431.3] kN
# Note: The pipe is in compression if the above effective force is negative.
# 2.3 Hydrodynamic Loading
# Note: The significant wave height and associated wave peak period are used to derive the hydrodynamic loading for the VIV maximum allowable free span lengths (DNVGLSTF101). The maximum wave height and wave maximum period are used to derive the hydrodynamic loading for the ULS check (local buckling check) (DNVGLSTF101).
# For both conditions, Airy linear wave theory is used to determine the wave kinematics in terms of velocity and acceleration applied to the pipe
# Load cases counter:
j := 0 .. 3
# Note: 4 environmental cases are considered
# 1. Significant wave loading (installation: 1-year wave + 1-year current)
# 2. Maximum wave loading (installation: 1-year wave + 1-year current)
# 3. Significant wave loading (operation 100-year wave + 10-year current)
# 4. Maximum wave loading (operation 100-year wave + 10-year current)
# 1-year significant wave height & period
H := [H_s_inst; H_max_inst; H_s_oper; H_max_oper]
T := [T_p_inst; T_max_inst; T_p_oper; T_max_oper]  # 1-year maximum wave height & period
# 100-year significant wave height & period
# 100-year maximum wave height & period
H[j] = [3.505; 7.00999; 4.78801; 9.57601] m
T[j] = [15.9; 15.9; 17.5; 17.5] s
# 1. Determine wave length
# Wavelength 1st guess value
λ := 150*m
Given
λ == g*T[j]^2/(2*π)*tanh(2*π*d_min/λ)
λ(j) := Find(λ)
λ[j] := λ(j)
λ[j] = [394.715; 394.715; 478.151; 478.151] m
# (for 1-year significant wave height & period)
# (for 1-year maximum wave height & period)
# (for 100-year significant wave height & period)
# (for 100-year maximum wave height & period)
# 2. Calculate wave particle velocity & acceleration
# Note: The linear wave theory (Airy) is used to compute the wave kinematics at the seabed.
# It should be mentioned that at this very deep water depth, the wave velocity and acceleration will be negligible.The use of Stokes wave theory will also yield the same results.
# The maximum wave water particle velocity and acceleration are:
# Maximum wave water particle velocity
# (at top of pipe)
U_w[j] := π*H[j]/T[j]*cosh(2*π/λ[j]*OD_tot)/sinh(2*π*d_min/λ[j])
U_w[j] = [2.90376e-10; 5.80751e-10; 1.76062e-8; 3.52124e-8] m/s
# Maximum wave water particle acceleration
# (at top of pipe)
A_w[j] := 2*π^2*H[j]/T[j]^2*cosh(2*π/λ[j]*OD_tot)/sinh(2*π*d_min/λ[j])
A_w[j] = [1.14747e-10; 2.29495e-10; 6.32132e-9; 1.26426e-8] m/s^2
# 3. Current velocity at pipe
# Note: The determination of the unfactored boundary layer average current velocity at the pipe is from DNV RP-F105
U_cpipe(u_cur) := u_cur*((ln(OD_tot/m) - ln(Z_o/m))/(ln(Z_ref/m) - ln(Z_o/m)))
# 1-year current
U_cpipe_inst := U_cpipe(u_cur_inst)
U_cpipe_inst = 0.133959 m/s
# 10-year current
U_cpipe_oper := U_cpipe(u_cur_oper)
U_cpipe_oper = 0.174147 m/s
U_cpipe := [U_cpipe_inst; U_cpipe_inst; U_cpipe_oper; U_cpipe_oper]
U_cpipe[j] = [0.133959; 0.133959; 0.174147; 0.174147] m/s
# 4. Determine hydrodynamic force applied to pipe
# Maximum combined wave and current velocity
U[j] := U_cpipe[j] + U_w[j]
U[j] = [0.133959; 0.133959; 0.174147; 0.174147] m/s
# Current flow velocity ratio (for significant wave)
# For installation
α.inst := U_cpipe[0]/(U_cpipe[0] + U_w[0])
α.inst = 1
# For operation
α.oper := U_cpipe[2]/(U_cpipe[2] + U_w[2])
α.oper = 1
# Flow regime
# For installation
Flow_regime_inst :=
    "Wave dominant-In-line VIV is negligible-Response model recommended for cross-flow VIV" if α.inst < 0.5
    "Wave dominant-In-line VIV  mitigated by waves-Cross-flow VIV:Response model recommended" if 0.5 < α.inst < 0.8
    "Current dominant-Response model recommended for both in-line and cross-flow VIVs" otherwise
Flow_regime_inst = "Current dominant-Response model recommended for both in-line and cross-flow VIVs"
# For operation
Flow_regime_oper :=
    "Wave dominant-In-line VIV is negligible-Response model recommended for cross-flow VIV" if α.oper < 0.5
    "Wave dominant-In-line VIV  mitigated by waves-Cross-flow VIV:Response model recommended" if 0.5 < α.oper < 0.8
    "Current dominant-Response model recommended for both in-line and cross-flow VIVs" otherwise
Flow_regime_oper = "Current dominant-Response model recommended for both in-line and cross-flow VIVs"
# Reynolds Number
R_e[j] := U[j]*OD_tot/v_k
R_e[j] = [32337.8; 32337.8; 42039.1; 42039.1]
# Keulegan-Carpenter number
KC[j] := U_w[j]*T[j]/OD_tot
KC[j] = [1.27505e-8; 2.55011e-8; 8.50893e-7; 1.70179e-6]
# Hydrodynamic forces of drag and inertia
# Note: The determination of the hydrodynamic forces of drag and inertia is based on Morison's equation
# Seabed gap ratio
e/OD_tot = 1.96686
# Added mass coefficient
C_a :=
    0.68 + 1.6/(1 + 5*(e/OD_tot)) if e/OD_tot < 0.8
    1 otherwise
C_a = 1
# Added mass
M_add := C_a*π/4*OD_tot^2*ρ_water
M_add = 105.553 kg/m
# Pipe mass (flooded)
M_pipe_flood := W_a_flood/g
M_pipe_flood = 244.653 kg/m
# Pipe mass (empty)
M_pipe_empty := W_a_empty/g
M_pipe_empty = 163.501 kg/m
# Pipe mass (in operation)
M_pipe_oper := W_a_oper/g
M_pipe_oper = 179.335 kg/m
# Effective mass (pipe flooded)
M_e_flood := M_pipe_flood + M_add
M_e_flood = 350.206 kg/m
# Effective mass (pipe empty)
M_e_empty := M_pipe_empty + M_add
M_e_empty = 269.054 kg/m
# Effective mass
# (pipe in operation)
M_e_oper := M_pipe_oper + M_add
M_e_oper = 284.888 kg/m
# Drag coefficient
# (for both the significant and maximum wave conditions)
C_D := [1.2; 1.2; 1.2; 1.2]
# Inertia coefficient
C_M := C_a + 1
C_M = 2
# The combined steady current and wave velocities over one wave period (phase angle θ =0-360°) is given as:
t := 0, 1 .. 360
θ[t] := t*π/360
# Combined velocity
U_c[t, j] := U_cpipe[j] + U_w[j]*cos(θ[t])
# Wave acceleration over one period
A_wacc[t, j] := A_w[j]*sin(θ[t])
# The resulting functions for the hydrodynamic forces are:
# Inertia force at pipeline
F_I[t, j] := π/4*ρ_water*C_M*OD_tot^2*A_wacc[t, j]
# Drag force at pipeline
F_D[t, j] := 0.5*ρ_water*C_D[j]*OD_tot*U_c[t, j]*|U_c[t, j]|
# Total horizontal hydrodynamic force
# (sum of drag & inertia forces)
F_tot[t, j] := F_D[t, j] + F_I[t, j]
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# Define the critical phase angle that coincides with the maximum horizontal force.
f(Pangle) := 0.5*ρ_water*C_D*OD_tot*(U_cpipe + U_w*cos(Pangle))*|U_cpipe + U_w*cos(Pangle)| + π/4*ρ_water*C_M*OD_tot^2*A_w*sin(Pangle)
# First guess at phase angle for maximum required submerged weight in each seastate
θ_Pangle[j] := (π/180*345)
# Given
0 < θ_Pangle < 2*π
Phase := Maximize(f, θ_Pangle)
θ_Pangle := Phase*180/π
θ_Pangle = [345.574; 346.152; 367.94; 367.885] rad
# Rounding phase to nearest degree
θ_Pangle[j] := round(θ_Pangle[j], 0)
θ_Pangle[j] = [346; 346; 368; 368]
# Determine maximum load (at critical phase angle)
# Wave induced velocities
U_w[j]*cos(θ_Pangle[j]) = [2.64567e-10; 5.29133e-10; -1.59765e-8; -3.19529e-8] m/s
# Total velocities
U_cPangle[j, j] := U_cpipe[j] + U_w[j]*cos(θ_Pangle[j])
U_cPangle[j, j] = [0.133959; 0.133959; 0.174147; 0.174147] m/s
# Wave accelerations
A_waccPangle[j, j] := A_w[j]*sin(θ_Pangle[j])
A_waccPangle[j, j] = [4.72927e-11; 9.45854e-11; -2.65618e-9; -5.31236e-9] m/s^2
# Inertia force applied to pipeline
F_IPangle[j, j] := π/4*ρ_water*C_M*OD_tot^2*A_waccPangle[j, j]
F_IPangle[j, j] = [9.98378e-9; 1.99676e-8; -5.60736e-7; -1.12147e-6] N/m
# Drag force at pipeline
F_DPangle[j, j] := 0.5*ρ_water*C_D[j]*OD_tot*U_cPangle[j, j]*|U_cPangle[j, j]|
F_DPangle[j, j] = [3.99622; 3.99622; 6.75361; 6.75361] N/m
F_tot[t, j] := F_D[t, j] + F_I[t, j]
# Total horizontal hydrodynamic force
# (sum of drag & inertia forces)
F_totPangle[j, j] := F_DPangle[j, j] + F_IPangle[j, j]
F_totPangle[j, j] = [3.99622; 3.99622; 6.75361; 6.75361] N/m
# Maximum lateral load
# (this is the dynamic load)
F_latph[j] := F_totPangle[j, j]
F_latph[j] = [3.99622; 3.99622; 6.75361; 6.75361] N/m
# 3. ALLOWABLE FREE SPAN LENGTH CALCULATIONS
# 3.1 Maximum Allowable Free Span Length -Local Buckling (Load controlled  criteria)-(DNVGLSTF101)
# Note: The local buckling span limitation is calculated according to Section 5-D505, Ref. 2 - Combined Loading Criteria (load controlled condition, internal overpressure).
# 4 load cases are analysed:
# 1. Hydrotest (system pressure test) -pipe is flooded
# 2. Installation - pipe is flooded (unpressurised)
# 3. Installation - pipe is empty (unpressurised, basecase)
# 4. Operation (system pressure) -pipe with operation content.
P_l[i] = [0; 146.505; 276.911; 243.586] bar
# Derated yield and tensile stress
f_y := [f_yinst; f_yinst; f_ytest_inst; f_yoper]
f_u := [f_utest_inst; f_uinst; f_utest_inst; f_uoper]
# Define pipe submerged weight for the above 4 conditions
W_s := [W_s_empty; W_s_flood; W_s_flood; W_s_oper]
W_s[i] = [568.465; 1364.57; 1364.57; 723.803] N/m
.
# Wall thickness
t_2 := wt
t_2 = 0.0193 m
# Plastic moment resistance
M_p[i] := f_y[i]*(OD - t_2)^2*t_2
M_p[i] = [941.566; 941.566; 980.798; 906.257] kN*m
# Characteristic plastic axial force resistance
S_p[i] := f_y[i]*π*(OD - t_2)*t_2
S_p[i] = [8782.71; 8782.71; 9148.66; 8453.36] kN
# Pressure containment (min of yield limit
# state& burst limit state)
P_b_2[i] := (2*t_2/(OD - t_2))*min(f_y[i], f_u[i]/1.15)*2/sqrt(3)
P_b_2[i] = [56.9159; 56.9159; 59.2874; 54.7816] MPa
# Normalised pressure
q_h[i] := P_l[i]/(P_b_2[i]*2/sqrt(3))
q_h[i] = [0; 0.22292; 0.404491; 0.385078]
OD/t_2 = 18.4508
β :=
    0.5 if OD/t_2 < 15
    (60 - (OD/t_2))/90 if 15 ≤ OD/t_2 ≤ 60
    0 if (OD/t_2) > 60
β = 0.461658
# Flow stress parameter
α_c[i] := (1 - β) + β*f_u[i]/f_y[i]
α_c[i] = [1.10726; 1.0845; 1.0845; 1.08779]
α_p[i] :=
    (1 - β) if P_l[i]/P_b_2[i] < 0.7
    1 - 3*β*(1 - P_l[i]/P_b_2[i]) if P_l[i]/P_b_2[i] ≥ 0.7
α_p[i] = [0.538342; 0.538342; 0.538342; 0.538342]
# Considering the free span as Pinned-Pinned for the Ultimate Limit State (ULS), the following boundary conditions are used. The apparent (visual) span length is used for the ULS check.
# The functional moment is taken as the static moment due to self weight only.
# First guess at free span apparent length
L := 10*m
# Euler Buckling load
P_E := π^2*E*I*C_2/L^2
# Estimate of static bending moment
M_static := C_5*W_s*L^2/(1 + S_eff/P_E)
M_F := M_static
M_F = [7.10582; 18.5036; 20.0144; 35.7084] kN*m
# The environmental moment is taken as the maximum dynamic moment (maximum wave) due to the lateral load from hydrodynamic forces
# For load cases 1, 2 and 3 (during installation)
M_dyn_inst[i] := C_5*F_latph[1]*L^2/(1 + S_eff[i]/P_E)
M_dyn_inst[i] = [0.0499528; 0.0541889; 0.0586134; 0.197152] kN*m
# For load case 4 (operation)
M_dyn_oper := C_5*F_latph[3]*L^2/(1 + S_eff[3]/P_E)
M_dyn_oper = 0.333186 kN*m
# Environmental Bending Moment (installation)
M_E_inst := M_dyn_inst
M_E_inst = [0.0499528; 0.0541889; 0.0586134; 0.197152] kN*m
# Environmental Bending Moment (operation)
M_E_oper := M_dyn_oper
M_E_oper = 0.333186 kN*m
# Functional axial force
# (Effective axial force)
S_F[i] := S_eff[i]
# Note: A dynamic amplification factor of 1.3 is assumed
S_E[i] := 0.3*S_F[i]
S_E[i] = [0; -139.191; -263.087; -1329.39] kN
# Design Bending Moment (installation)
M_d_inst[i] := M_F[i]*γ_F*γ_c[i] + M_E_inst[i]*γ_E
M_d_inst = [7.88134; 21.8492; 23.6332; 39.5356] kN*m
# Note: Ignore the last value (row 4) as it is associated with operation load case
# Design Bending Moment (operation)
M_d_oper := M_F[3]*γ_F*γ_c[3] + M_E_oper*γ_E
M_d_oper = 39.7124 kN*m
# Design Effective Axial Force
S_d[i] := S_F[i]*γ_F*γ_c[i] + S_E[i]*γ_E
S_d = [0; -727.041; -1374.19; -6602.64] kN
# Note: The first 3 rows are for installation load cases (load case 1 to 3) and the last value (row 4) as for operation load case(load case 4).
# Local Buckling Criteria
(γ_sc*γ_m*M_d[i]/(α_c[i]*M_p[i]) + (γ_sc*γ_m*S_d[i]/(α_c[i]*S_p[i]))^2)^2 + (α_p[i]*(P_l[i] - P_exmin)/(α_c[i]*P_b_2[i]*(2/sqrt(3))))^2 ≤ 1.0
0
# Defining in terms of the apparent length and solving for the maximum apparent (visual) span length.
#
# Note: The user may need to vary the guess value for the length top aid solution convergence.
#
# Note: The hydrodynamic force is that derived from the maximum wave height.
# 1. Load case 1: Unpressurized (pipe empty)
# First guess for L
L := 10*m
Given
((γ_sc*γ_m*((C_5*W_s[0]*L^2/(1 + S_eff[0]/(π^2*E*I*C_2/L^2))*γ_F*γ_c[0]) + (C_5*F_latph[1]*L^2/(1 + S_eff[0]/(π^2*E*I*C_2/L^2))*γ_E))/(α_c[0]*M_p[0]) + (γ_sc*γ_m*S_d[0]/(α_c[0]*S_p[0]))^2)^2 + (α_p[0]*(P_l[0] - P_exmin)/(α_c[0]*P_b_2[0]*(2/sqrt(3))))^2) == 1
# Unpressurised Empty Maximum Allowable Span Length
L_span_empty := Minerr(L)
L_span_empty = 100.148 m
ERR = 0.421308
# 2. Load case 2: Pipe unpressurised, pipe is flooded
L := 30*m
Given
((γ_sc*γ_m*((C_5*W_s[1]*L^2/(1 + S_eff[1]/(π^2*E*I*C_2/L^2))*γ_F*γ_c[1]) + (C_5*F_latph[1]*L^2/(1 + S_eff[1]/(π^2*E*I*C_2/L^2))*γ_E))/(α_c[1]*M_p[1]) + (γ_sc*γ_m*S_d[1]/(α_c[1]*S_p[1]))^2)^2 + (α_p[1]*(P_l[1] - P_exmin)/(α_c[1]*P_b_2[1]*(2/sqrt(3))))^2) == 1
# Unpressurised (Flooded) Maximum Allowable Span Length
L_span_flood := Minerr(L)
ERR = 0.430468
L_span_flood = 30.9614 m
# 3. Load case 3:  System pressure (hydrotest), pipe is flooded
L := 10*m
Given
((γ_sc*γ_m*((C_5*W_s[2]*L^2/(1 + S_eff[2]/(π^2*E*I*C_2/L^2))*γ_F*γ_c[2]) + (C_5*F_latph[1]*L^2/(1 + S_eff[2]/(π^2*E*I*C_2/L^2))*γ_E))/(α_c[2]*M_p[2]) + (γ_sc*γ_m*S_d[2]/(α_c[2]*S_p[2]))^2)^2 + (α_p[2]*(P_l[2] - P_exmin)/(α_c[2]*P_b_2[2]*(2/sqrt(3))))^2) == 1
L_span_hyd := Minerr(L)
# System Pressure Test Maximum Allowable Span Length
ERR = 0.436681
L_span_hyd = 24.0005 m
# 4. Load case 4: Pipe in operation
L := 10*m
Given
((γ_sc*γ_m*((C_5*W_s[3]*L^2/(1 + S_eff[3]/(π^2*E*I*C_2/L^2))*γ_F*γ_c[3]) + (C_5*F_latph[1]*L^2/(1 + S_eff[3]/(π^2*E*I*C_2/L^2))*γ_E))/(α_c[3]*M_p[3]) + (γ_sc*γ_m*S_d[3]/(α_c[3]*S_p[3]))^2)^2 + (α_p[3]*(P_l[3] - P_exmin)/(α_c[3]*P_b_2[3]*(2/sqrt(3))))^2) == 1
# Operation Maximum Allowable Span Length
L_span_operation := Minerr(L)
L_span_operation = 10.245 m
ERR = 0.821566
# 3.2 Maximum Allowable Free Span Length - Global Buckling (Euler Bar Buckling)
# Note: Global buckling is checked using the Euler bar buckling criteria with the bar buckling axial force (compression).
# Euler buckling load
P_E := |S_eff|
# Guess values
L_eff0 := 10*m
L_eff1 := 10*m
L_eff2 := 10*m
L_eff3 := 10*m
Given
# Unpressurised -pipe empty
|S_eff[0]| == π^2*E*I*C_2/L_eff0^2
# Unpressurised -pipe flooded
|S_eff[1]| == π^2*E*I*C_2/L_eff1^2
# System pressure test load case
|S_eff[2]| == π^2*E*I*C_2/L_eff2^2
# operation
|S_eff[3]| == π^2*E*I*C_2/L_eff3^2
[L_span_globuck_empty; L_span_globuck_flood; L_span_globuck_hyd; L_span_globuck_oper] := Find(L_eff0, L_eff1, L_eff2, L_eff3)
[L_span_globuck_empty; L_span_globuck_flood; L_span_globuck_hyd; L_span_globuck_oper] = [7.0504e16; 0; 0; 0] m
# Unpressurised -pipe empty
L_span_globuck_empty = 7.0504e16 m  # (Pipe does not buckle)
# Unpressurised -pipe flooded
L_span_globuck_flood = 35.7659 m
# System pressure test load case
L_span_globuck_hyd = 26.015 m
# Pipe in operation
L_span_globuck_oper = 11.5731 m
# 3.3 Maximum Allowable Free Span Length -In-Line VIVs
# Note: The span lengths are determined for the system pressure test and installation cases using the 1-year significant wave height and 100-year significant wave height for operation load case
# Stability parameter (pipe flooded)
K_s_flood := 4*π*M_e_flood*ζ_T/(ρ_water*OD_tot^2)
K_s_flood = 0.491184
# Stability parameter (pipe empty)
K_s_empty := 4*π*M_e_empty*ζ_T/(ρ_water*OD_tot^2)
K_s_empty = 0.377363
# Stability parameter (pipe with operational content)
K_s_oper := 4*π*M_e_oper*ζ_T/(ρ_water*OD_tot^2)
K_s_oper = 0.399572
# Stability including safety factor on damping
K_sd_flood := K_s_flood/γ_k
K_sd_flood = 0.491184
# Stability including safety factor on damping
K_sd_empty := K_s_empty/γ_k
K_sd_empty = 0.377363
# Stability including safety factor on damping
K_sd_oper := K_s_oper/γ_k
K_sd_oper = 0.399572
# Reduced velocity for onset of In-line vortex shedding
# (pipe flooded)
V_R_IL_onset_flood :=
    1.0/γ_onIL if K_sd_flood < 0.4
    (0.6 + K_sd_flood)/γ_onIL if 0.4 ≤ K_sd_flood ≤ 1.6
    2.2/γ_onIL otherwise
V_R_IL_onset_flood = 0.991985
# Reduced velocity for onset of In-line vortex
# shedding (pipe empty)
V_R_IL_onset_empty :=
    1.0/γ_onIL if K_sd_empty < 0.4
    (0.6 + K_sd_empty)/γ_onIL if 0.4 ≤ K_sd_empty ≤ 1.6
    2.2/γ_onIL otherwise
V_R_IL_onset_empty = 0.909091
# Reduced velocity for onset of In-line vortex
# shedding (pipe in operation)
V_R_IL_onset_oper :=
    1.0/γ_onIL if K_sd_oper < 0.4
    (0.6 + K_sd_oper)/γ_onIL if 0.4 ≤ K_sd_oper ≤ 1.6
    2.2/γ_onIL otherwise
V_R_IL_onset_oper = 0.909091
# Reduced velocity (pipe flooded)
f_0_VIV_onset_flood := (U_cpipe[0] + U_w[0])/(V_R_IL_onset_flood*OD_tot)
f_0_VIV_onset_flood = 0.37294 s^-1
# Reduced velocity (pipe empty)
f_0_VIV_onset_empty := (U_cpipe[0] + U_w[0])/(V_R_IL_onset_flood*OD_tot)
f_0_VIV_onset_empty = 0.37294 s^-1
# Reduced velocity (operation)
f_0_VIV_onset_oper := (U_cpipe[2] + U_w[2])/(V_R_IL_onset_flood*OD_tot)
f_0_VIV_onset_oper = 0.484822 s^-1
# Rearrange to determine the VIV onset frequency
# For installation
α_inst :=
    0.6 if α.inst < 0.6
    α.inst otherwise
α_inst = 1
# For operation
α_oper :=
    0.6 if α.oper < 0.6
    α.oper otherwise
α_oper = 1
# VIV screening criteria equation
|S_eff[1]| == π^2*E*I*C_2/L_eff^2
f_0_IL == (U_cpipe/(V_R_IL_onset*OD_tot*α_inst))*(1 - (L/OD_tot/250))*γ_IL
# In-line VIV onset frequency w/t safety factor
f_0 == f_0_IL*γ_F
# The pipeline free span is determined such that the natural frequency is higher than the VIV on-set frequency, hence avoiding any VIV induced response/fatigue damage
# The pipeline free span natural frequency is approximated .The free span is considered as a single span on the seabed. This is considered to realistically reflect what may occur during installation, i.e.. no multiple spans or interaction.
# Static deflection ignored for in-line
δ := 0*m
# Euler Buckling load
P_E == π^2*E*I*C_2/L_eff^2
# Fundamental Natural Frequency
f_0 == C_1*sqrt(E*I/(M_e*L_eff^4)*(1 + S_eff/P_E + C_3*(δ/OD_tot)^2))
# Equating fundamental natural frequency to that obtained from screening criteria:
# 1. Unpressurised (pipe empty)
# Assume first guess value
L_eff := 10*m
Given
C_1*sqrt(E*I/(M_e_empty*L_eff^4)*(1 + S_eff[0]/(π^2*E*I*C_2/L_eff^2) + C_3*(δ/OD_tot)^2)) == U_cpipe[0]/(V_R_IL_onset_empty*OD_tot*α_inst)*(1 - (L_eff/OD_tot)/250)*γ_IL*γ_F
L_eff_IL[0] := Minerr(L_eff)
L_eff_IL[0] = 54.725 m
ERR = 2.77556e-17
# 2. Unpressurised (pipe flooded)
# Assume first guess value
L_eff := 10*m
Given
C_1*sqrt(E*I/(M_e_flood*L_eff^4)*(1 + S_eff[1]/(π^2*E*I*C_2/L_eff^2) + C_3*(δ/OD_tot)^2)) == U_cpipe[1]/(V_R_IL_onset_flood*OD_tot*α_inst)*(1 - (L_eff/OD_tot)/250)*γ_IL*γ_F
L_eff_IL[1] := Minerr(L_eff)
L_eff_IL[1] = 30.1888 m
ERR = 0
# 3. Hydrotest (pipe flooded)
L_eff := 10*m
Given
C_1*sqrt(E*I/(M_e_flood*L_eff^4)*(1 + S_eff[2]/(π^2*E*I*C_2/L_eff^2) + C_3*(δ/OD_tot)^2)) == U_cpipe[2]/(V_R_IL_onset_flood*OD_tot*α_inst)*(1 - (L_eff/OD_tot)/250)*γ_IL*γ_F
L_eff_IL[2] := Minerr(L_eff)
L_eff_IL[2] = 23.1357 m
ERR = 0
# 4. Pipe in operation
# guess value
L_eff := 10*m
Given
C_1*sqrt(E*I/(M_e_oper*L_eff^4)*(1 + S_eff[3]/(π^2*E*I*C_2/L_eff^2) + C_3*(δ/OD_tot)^2)) == U_cpipe[3]/(V_R_IL_onset_oper*OD_tot*α_oper)*(1 - (L_eff/OD_tot)/250)*γ_IL*γ_F
L_eff_IL[3] := Minerr(L_eff)
L_eff_IL[3] = 11.475 m
ERR = 4.44089e-16
# Assume first guess value
L := L_eff_IL[0]
L_eff := L_eff_IL[0]
Given
L == {
    L_eff*(-0.066*log(K_L*L^4/(E*I))^2 + 1.02*log(K_L*L^4/(E*I)) + 0.63)/4.73 if log(K_L*L^4/(E*I)) ≥ 2.7
    L_eff*(0.036*log(K_L*L^4/(E*I))^2 + 0.61*log(K_L*L^4/(E*I)) + 1.0)/4.73 if log(K_L*L^4/(E*I)) < 2.7
}
L_app_IL[0] := Minerr(L)
L_app_IL[0] = 47.5532 m
ERR = 7.10543e-15
# Assume first guess value
L := L_eff_IL[1]
L_eff := L_eff_IL[1]
Given
L == {
    L_eff*(-0.066*log(K_L*L^4/(E*I))^2 + 1.02*log(K_L*L^4/(E*I)) + 0.63)/4.73 if log(K_L*L^4/(E*I)) ≥ 2.7
    L_eff*(0.036*log(K_L*L^4/(E*I))^2 + 0.61*log(K_L*L^4/(E*I)) + 1.0)/4.73 if log(K_L*L^4/(E*I)) < 2.7
}
L_app_IL[1] := Minerr(L)
L_app_IL[1] = 22.6701 m
ERR = 0
# Assume first guess value
L := L_eff_IL[2]
L_eff := L_eff_IL[2]
Given
L == {
    L_eff*(-0.066*log(K_L*L^4/(E*I))^2 + 1.02*log(K_L*L^4/(E*I)) + 0.63)/4.73 if log(K_L*L^4/(E*I)) ≥ 2.7
    L_eff*(0.036*log(K_L*L^4/(E*I))^2 + 0.61*log(K_L*L^4/(E*I)) + 1.0)/4.73 if log(K_L*L^4/(E*I)) < 2.7
}
L_app_IL[2] := Minerr(L)
L_app_IL[2] = 15.5856 m
ERR = 0
# Assume first guess value
L := L_eff_IL[3]
L_eff := L_eff_IL[3]
Given
L == {
    L_eff*(-0.066*log(K_L*L^4/(E*I))^2 + 1.02*log(K_L*L^4/(E*I)) + 0.63)/4.73 if log(K_L*L^4/(E*I)) ≥ 2.7
    L_eff*(0.036*log(K_L*L^4/(E*I))^2 + 0.61*log(K_L*L^4/(E*I)) + 1.0)/4.73 if log(K_L*L^4/(E*I)) < 2.7
}
L_app_IL[3] := Minerr(L)
L_app_IL[3] = 2.57711 m
ERR = 0.120254
# In-line VIV (Visual Span Length)
L_span_IL[i] :=
    L_eff_IL[i] if BC == 1
    L_eff_IL[i] if BC == 2
    L_app_IL[i] if BC == 3
L_span_IL[i] = [54.725; 30.1888; 23.1357; 11.475] m
# 3.4 Maximum Allowable Free Span Length -Cross-Flow VIVs
# Note: The span lengths are determined for the system pressure test and installation cases using the 1-year significant wave height and 100-year significant wave height for operation load case.Response model is used to determine the vortex shedding onset for cross-flow vibrations.
# Correction factor for seabed proximity
ψ_proxi_onset :=
    1/5*(4 + 1.25*e/OD_tot) if (e/OD_tot) < 0.8
    1 otherwise
ψ_proxi_onset = 1
# Correction factor for trench effect
# (conservative to assume no trench effect on pipe)
ψ_trench_onset := 1 + 0.5*Δ/OD_tot
ψ_trench_onset = 1
# Reduced velocity for onset of Cross-flow
# vortex shedding onset
V_R_CF_onset := 3*ψ_proxi_onset*ψ_trench_onset/γ_onCF
V_R_CF_onset = 2.5
# Cross-flow VIV onset frequency (installation)
f_0_CF_onset_inst := γ_CF*(U_cpipe[0] + U_w[0])/(V_R_CF_onset*OD_tot)
f_0_CF_onset_inst = 0.207173 s^-1
# Cross-flow VIV onset frequency (operation)
f_0_CF_onset_oper := γ_CF*(U_cpipe[2] + U_w[2])/(V_R_CF_onset*OD_tot)
f_0_CF_onset_oper = 0.269325 1/s
# Cross-flow VIV onset frequency w/t safety factor
# (installation)
f_0_CF_inst := f_0_CF_onset_inst*γ_F
f_0_CF_inst = 0.22789 s^-1
# Cross-flow VIV onset frequency w/t safety factor
# (operation)
f_0_CF_oper := f_0_CF_onset_oper*γ_F
f_0_CF_oper = 0.296257 s^-1
# The pipeline free span is determined such that the natural frequency is higher than the VIV on-set frequency, hence avoiding any VIV induced response/fatigue damage (DNVRPF105)
#
# The pipeline free span natural frequency is approximated in DNVRPF105. The free span is
# considered as a single span on the seabed. This is considered to realistically reflect what may occur during installation, i.e. no multiple spans or interaction
# Euler buckling load
P_E == π^2*E*I*C_2/L_eff^2
# Static deflection
δ == C_6*W_s*L_eff_CF^4/(E*I)*1/(1 + S_eff[i]/(π^2*E*I*C_2/L_eff_CF^2))
# Fundamental natural frequency
f_0 == C_1*sqrt(E*I/(M_e*L_eff_CF^4)*(1 + S_eff/P_E + C_3*(δ[i]/OD_tot)^2))
# Effective mass (pipe flooded & empty)
M_e := [M_e_empty; M_e_flood; M_e_flood; M_e_oper]
M_e[i] = [269.054; 350.206; 350.206; 284.888] kg/m
# Defining the criteria in terms of the effective span length:
# Installation (load cases 1, 2 and 3)
# First guess at free span effective length
L_eff_CF := 10*m
Given
C_1*sqrt(E*I/(M_e[i]*L_eff_CF^4)*(1 + S_eff[i]/(π^2*E*I*C_2/L_eff_CF^2) + C_3*(C_6*W_s*L_eff_CF^4/(E*I)*1/(1 + S_eff[i]/(π^2*E*I*C_2/L_eff_CF^2))/OD_tot)^2)) == f_0_CF_inst
L_eff_CF_inst(i) := Minerr(L_eff_CF)
L_eff_CF_inst[i] := L_eff_CF_inst(i)
L_eff_CF_inst[i] = [36.1748; 26.1516; 21.8018; 11.9022] m
# Operation (load case 4))
# Guess value
L_eff_CF := 10*m
Given
C_1*sqrt(E*I/(M_e[3]*L_eff_CF^4)*(1 + S_eff[3]/(π^2*E*I*C_2/L_eff_CF^2) + C_3*(C_6*W_s*L_eff_CF^4/(E*I)*1/(1 + S_eff[3]/(π^2*E*I*C_2/L_eff_CF^2))/OD_tot)^2)) == f_0_CF_inst
L_eff_CF_oper := Minerr(L_eff_CF)
L_eff_CF_oper = 11.9022 m
ERR = 1.55177
# Static deflection (installation)
δ_inst[i] := C_6*W_s[i]*L_eff_CF_inst[i]^4/(E*I)*1/(1 + S_eff[i]/(π^2*E*I*C_2/L_eff_CF_inst[i]^2))
δ_inst[i] = [0.210786; 0.296969; 0.224252; -0.0545226] m
# Static deflection (operation)
δ_oper := C_6*W_s[3]*L_eff_CF_oper^4/(E*I)*1/(1 + S_eff[3]/(π^2*E*I*C_2/L_eff_CF_oper^2))
δ_oper = -0.0545226 m
# The relationship between the effective span length and apparent (visual) span length is defined in DNVRPF105.The definition for β is substituted to solve for the apparent length.
# Assume first guess value
L := L_eff_CF_inst[0]
L_eff := L_eff_CF_inst[0]
Given
L == {
    L_eff*(-0.066*log(K_L*L^4/(E*I))^2 + 1.02*log(K_L*L^4/(E*I)) + 0.63)/4.73 if log(K_L*L^4/(E*I)) ≥ 2.7
    L_eff*(0.036*log(K_L*L^4/(E*I))^2 + 0.61*log(K_L*L^4/(E*I)) + 1.0)/4.73 if log(K_L*L^4/(E*I)) < 2.7
}
L_app_CF_inst[0] := Minerr(L)
L_app_CF_inst = [28.7074] m
ERR = 0
# Assume first guess value
L := L_eff_CF_inst[1]
L_eff := L_eff_CF_inst[1]
Given
L == {
    L_eff*(-0.066*log(K_L*L^4/(E*I))^2 + 1.02*log(K_L*L^4/(E*I)) + 0.63)/4.73 if log(K_L*L^4/(E*I)) ≥ 2.7
    L_eff*(0.036*log(K_L*L^4/(E*I))^2 + 0.61*log(K_L*L^4/(E*I)) + 1.0)/4.73 if log(K_L*L^4/(E*I)) < 2.7
}
L_app_CF_inst[1] := Minerr(L)
L_app_CF_inst[1] = 18.6135 m
ERR = 0
# Assume first guess value
L := L_eff_CF_inst[2]
L_eff := L_eff_CF_inst[2]
Given
L == {
    L_eff*(-0.066*log(K_L*L^4/(E*I))^2 + 1.02*log(K_L*L^4/(E*I)) + 0.63)/4.73 if log(K_L*L^4/(E*I)) ≥ 2.7
    L_eff*(0.036*log(K_L*L^4/(E*I))^2 + 0.61*log(K_L*L^4/(E*I)) + 1.0)/4.73 if log(K_L*L^4/(E*I)) < 2.7
}
L_app_CF_inst[2] := Minerr(L)
L_app_CF_inst[2] = 14.2438 m
ERR = 1.77636e-15
# Assume first guess value
L := 20*m
L_eff := 20*m
Given
L == {
    L_eff*(-0.066*log(K_L*L^4/(E*I))^2 + 1.02*log(K_L*L^4/(E*I)) + 0.63)/4.73 if log(K_L*L^4/(E*I)) ≥ 2.7
    L_eff*(0.036*log(K_L*L^4/(E*I))^2 + 0.61*log(K_L*L^4/(E*I)) + 1.0)/4.73 if log(K_L*L^4/(E*I)) < 2.7
}
L_app_CF_oper := Minerr(L)
L_app_CF_oper = 12.4225 m
ERR = 1.77636e-15
# Cross-Flow VIV (Visual Span Length)
# Installation
L_span_CF_inst[i] :=
    L_eff_CF_inst[i] if BC == 1
    L_eff_CF_inst[i] if BC == 2
    L_app_CF_inst[i] if BC == 3
L_span_CF_inst = [36.1748; 26.1516; 21.8018; 11.9022] m
# Operation
L_span_CF_oper :=
    L_eff_CF_oper if BC == 1
    L_eff_CF_oper if BC == 2
    L_app_CF_oper if BC == 3
L_span_CF_oper = 11.9022 m
# 4. SUMMARY OF RESULTS
#
# The maximum allowable free spans have been calculated for global, local buckling criteria and onset of in-line and cross-flow
# vibrations. 4 load cases have been considered:
# 1. Installed with the pipe empty (defined as depressurised, pipe empty); and;
# 2. Installation with the pipe flooded (defined as depressurised , pipe flooded);
# 3. Hydrotest prior to operation (defined as system pressure test where the pipe is flooded);
# 4. Pipe in operation (under design pressure).
#
# For load case 4 (pipe in operation), the pipe is considered operating on seabed (not trenched or buried).
# For load cases 1, 2 and 3, the 1-year return wave and 1-year return current are used to derive the hydrodynamic forces at the pipe.
# For load case 4, the 100-year return wave and 10-year return current are used to derive the hydrodynamic forces at the pipe.
# For determining the maximum allowable free span lengths to avoid in-line and cross-flow VIVs, the significant wave height along with the wave peak period and associated seabed current are used. For determining the maximum allowable free span length to avoid local buckling, the maximum wave height along with the wave maximum period and associated seabed current are used.
# 1. Local Buckling Condition
#
# Load case 1 -Pipe installed Empty
#
# Load case 2 -Pipe installed Flooded
#
# Load case 3 - Hydrotest
#
# Load case 4 -Pipe in Operation
L_span_empty = 100.148 m
L_span_flood = 30.9614 m
L_span_hyd = 24.0005 m
L_span_operation = 10.245 m
# 2. Glocal Buckling Condition
#
# Load case 1 -Pipe installed Empty
#
# Load case 2 -Pipe installed Flooded
#
# Load case 3 -Hydrotest
#
# Load case 4 -Pipe in Operation
L_span_globuck_empty = 7.0504e16 m  # (pipe does not buckle)
L_span_globuck_flood = 35.7659 m
L_span_globuck_hyd = 26.015 m
L_span_globuck_oper = 11.5731 m
# 3. In-line VIV Condition
#
# Load case 1 -Pipe installed Empty
#
# Load case 2 -Pipe installed Flooded
#
# Load case 3 -Hydrotest
#
# Load case 4 -Pipe in Operation
L_span_IL[0] = 54.725 m
L_span_IL[1] = 30.1888 m
L_span_IL[2] = 23.1357 m
L_span_IL[3] = 11.475 m
# 4. Cross-flow VIV Condition
#
# Load case 1 -Pipe installed Empty
#
# Load case 2 -Pipe installed Flooded
#
# Load case 3 -Hydrotest
#
# Load case 4 -Pipe in Operation
L_span_CF_inst[0] = 36.1748 m
L_span_CF_inst[1] = 26.1516 m
L_span_CF_inst[2] = 21.8018 m
L_span_CF_oper = 11.9022 m
Summary_Allowable_span_length := [
    "LOADCASES", "As-laid", "Flooded", "Hydrotest", "Operation";
    "Local Buckling", L_span_empty, L_span_flood, L_span_hyd, L_span_operation;
    "Global Buckling", "No onset", L_span_globuck_flood, L_span_globuck_hyd, L_span_globuck_oper;
    "In-line VIV", L_span_IL[0], L_span_IL[1], L_span_IL[2], L_span_IL[3];
    "Cross-flow VIV", L_span_CF_inst[0], L_span_CF_inst[1], L_span_CF_inst[2], L_span_CF_oper
]
Summary_Allowable_span_length = [
    "LOADCASES", "As-laid", "Flooded", "Hydrotest", "Operation";
    "Local Buckling", 100.148, 30.9614, 24.0005, 10.245;
    "Global Buckling", "No onset", 35.7659, 26.015, 11.5731;
    "In-line VIV", 54.725, 30.1888, 23.1357, 11.475;
    "Cross-flow VIV", 36.1748, 26.1516, 21.8018, 11.9022
] m
# Note: For α less than 0.5 in-line VIV is negligible. For α between 0.5 to 0.8 in-line VIV is mitigated due to the presence of waves.
α.inst = 1
α.oper = 1
L_span_max_0 :=
    min(L_span_empty, L_span_globuck_empty, L_span_IL[0], L_span_CF_inst[0]) if α.inst > 0.8
    min(L_span_empty, L_span_globuck_empty, L_span_CF_inst[0]) otherwise
L_span_max_0 = 36.1748 m  # Unpressurized, Empty
L_span_max_1 :=
    min(L_span_flood, L_span_globuck_flood, L_span_IL[1], L_span_CF_inst[1]) if α.inst > 0.8
    min(L_span_flood, L_span_globuck_flood, L_span_CF_inst[1]) otherwise
L_span_max_1 = 26.1516 m  # Unpressurized, Flooded
L_span_max_2 :=
    min(L_span_hyd, L_span_globuck_hyd, L_span_IL[2], L_span_CF_inst[2]) if α.inst > 0.8
    min(L_span_hyd, L_span_globuck_hyd, L_span_CF_inst[2]) otherwise
L_span_max_2 = 21.8018 m
# System Pressure Test
L_span_max_3 :=
    min(L_span_operation, L_span_globuck_oper, L_span_IL[3], L_span_CF_oper) if α.inst > 0.8
    min(L_span_operation, L_span_globuck_oper, L_span_CF_oper) otherwise
L_span_max_3 = 10.245 m  # Pipe in operation
Allowable_span_length := [
    "", "As-laid", "Flooded", "Hydrotest", "Operation";
    "Gas Export line", L_span_max_0, L_span_max_1, L_span_max_2, L_span_max_3
]
Allowable_span_length = [
    "", "As-laid", "Flooded", "Hydrotest", "Operation";
    "Gas Export line", 36.1748, 26.1516, 21.8018, 10.245
] m
# Maximum Allowable Free span length at installation (regardless of load case)
L_span_max_inst := min(L_span_max_0, L_span_max_1, L_span_max_2)
L_span_max_inst = 21.8018 m
# Maximum Allowable Free span length at operation
L_span_max_oper := L_span_max_3
L_span_max_oper = 10.245 m
